R_1 := 1000
R_2 := 1500
L := 2
C := 10^-5
E := 50
u_C(0) == 0
i_L(0) == 0
t_max := 0.4
Given
L*d/dt(i_1(t)) == E - u_c(t)
i_1(0) == 0
C*d/dt(u_c(t)) == i_1(t) - u_c(t)/(R_1 + R_2)
u_c(0) == 0
[i; u_C] := Odesolve([i_1; u_c], t, t_max)
t := 0, 0.001 .. t_max
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ORIGIN := 1
D(t, Y) := [(E - Y[2])/L; (Y[1] - Y[2]/(R_1 + R_2))/C]
y_0 := [0; 0]
t_min := 0
t_max := 0.4
N := 5000
Z := rkfixed(y_0, t_min, t_max, N, D)
t_1 := Z[:, 1]
i_1 := Z[:, 2]
u_C.1 := Z[:, 3]
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