R_1 := 6
R_2 := 12
R_3 := 9
R_4 := 15
R_5 := 19.5
R_6 := 15
E_1 := 0
E_2 := 69
E_3 := 22.5
E_к2 := 24
E_к1 := 0
A := [
    1, 1, 0, 0, 1, 0;
    0, -1, 1, 0, 0, -1;
    0, 0, -1, 1, -1, 0;
    0, 0, 9, 15, 0, 15;
    6, 0, 0, -15, -19.5, 0;
    -6, 12, 0, 0, 0, -15
]
B := [0; 0; 0; 22.5; 0; -1.5]
A^-1 = [
    0.714408, 0.37307, 0.340909, -0.00357347, 0.0191538, -0.0284448;
    0.170669, -0.313036, -0.113636, 0.0221555, 0.0145798, 0.0430246;
    0.0214408, 0.287307, -0.340909, 0.0413093, 0.018582, 0.0221555;
    0.136364, 0.227273, 0.431818, 0.0227273, -0.0151515, 0.00757576;
    0.114923, -0.0600343, -0.227273, -0.018582, -0.0337336, -0.0145798;
    -0.149228, -0.399657, -0.227273, 0.0191538, 0.00400229, -0.0208691
]
X := A^-1*B = [-0.0377358; 0.433962; 0.896226; 0.5; -0.396226; 0.462264]
B := A*X = [0; 0; 0; 22.5; 0; -1.5]
B := [0; 0; 0; 22.5; 0; -1.5]
ORIGIN := 1
i := 1 .. 6
j := 1 .. 6
Δ := |A| = 31482
C := A
A[i, 1] := B[i]
A = [
    0, 1, 0, 0, 1, 0;
    0, -1, 1, 0, 0, -1;
    0, 0, -1, 1, -1, 0;
    22.5, 0, 9, 15, 0, 15;
    0, 0, 0, -15, -19.5, 0;
    -1.5, 12, 0, 0, 0, -15
]
Δ_1 := |A|
x_1 := Δ_1/Δ = -0.0377358
A := C
A[i, 2] := B[i]
A = [
    1, 0, 0, 0, 1, 0;
    0, 0, 1, 0, 0, -1;
    0, 0, -1, 1, -1, 0;
    0, 22.5, 9, 15, 0, 15;
    6, 0, 0, -15, -19.5, 0;
    -6, -1.5, 0, 0, 0, -15
]
Δ_2 := |A|
x_2 := Δ_2/Δ = 0.433962
A := C
A[i, 3] := B[i]
A = [
    1, 1, 0, 0, 1, 0;
    0, -1, 0, 0, 0, -1;
    0, 0, 0, 1, -1, 0;
    0, 0, 22.5, 15, 0, 15;
    6, 0, 0, -15, -19.5, 0;
    -6, 12, -1.5, 0, 0, -15
]
Δ_3 := |A|
x_3 := Δ_3/Δ = 0.896226
A := C
A[i, 4] := B[i]
A = [
    1, 1, 0, 0, 1, 0;
    0, -1, 1, 0, 0, -1;
    0, 0, -1, 0, -1, 0;
    0, 0, 9, 22.5, 0, 15;
    6, 0, 0, 0, -19.5, 0;
    -6, 12, 0, -1.5, 0, -15
]
Δ_4 := |A|
x_4 := Δ_4/Δ = 0.5
A := C
A[:, 5] := B
A = [
    1, 1, 0, 0, 0, 0;
    0, -1, 1, 0, 0, -1;
    0, 0, -1, 1, 0, 0;
    0, 0, 9, 15, 22.5, 15;
    6, 0, 0, -15, 0, 0;
    -6, 12, 0, 0, -1.5, -15
]
Δ_5 := |A|
x_5 := Δ_5/Δ = -0.396226
A := C
A := augment(submatrix(A, 1, 6, 1, 5), B)
Δ_6 := |A|
x_6 := Δ_6/Δ = 0.462264
A = [
    1, 1, 0, 0, 1, 0;
    0, -1, 1, 0, 0, 0;
    0, 0, -1, 1, -1, 0;
    0, 0, 9, 15, 0, 22.5;
    6, 0, 0, -15, -19.5, 0;
    -6, 12, 0, 0, 0, -1.5
]
